# AguaClara Water Treatment Plants
# Design References
# MathCAD dimension calculations:
# Variable Naming Guide
# The list below is the list names that can be used before the period for the subscript in our variable names.
# Major Plant Components. These items follow the period in the variable name
# [reference: BasicInputs.xmcd]
# [reference: ExpertInputs.xmcd]
# [reference: MathFunctions.xmcd]
# [reference: PipeDatabase.xmcd]
# [reference: FluidsFunctions.xmcd]
# [reference: SedimentationTank.xmcd]
# [reference: Flocculator.xmcd]
# [reference: LFOM.xmcd]
[
    "Subscripts", "";
    "component key", "Description";
    "Et", "Entrance tank";
    "Lfom", "Linear flow orifice meter";
    "Rm", "Rapid mix";
    "Floc", "Flocculation tank";
    "Sed", "Sedimentation tank";
    "Fi", "Stacked Rapid Sand Filter"
]
# [reference: LinearCdc.xmcd]
# [reference: ChemStorageTanks.xmcd]
# [reference: EntranceTank.xmcd]
# [reference: StackedRapidSandFilterabh35.xmcd]
# [reference: DrainChannel.xmcd]
# [reference: MaterialsList.xmcd]
# AutoCAD drawing programs:
# Translators:
# These are the codes that take MathCAD outputs and create AutoCAD scripts that are used to draw the plant (formerly Basics)
# [reference: MtoATranslators.xmcd]
# The wrapped MtoA translator contains the functions that the user will want to access. These functions will draw pieces with full functionality - specifying the location, dimension, and orientation of the object. Also, it contains layer control and subtraction capabilities for grouped objects.
# [reference: MtoATranslatorsWrapped.xmcd]
# Plant Elements:
# These are all of the files that draw the fundamental parts of the plants (tees, elbows, tanks, pipes, etc)
[
    "Symbol", "Description", "Dimensions";
    "Amp", "amplitude", "L";
    "B", "perpendicular distance between components (center to center)", "L";
    "D", "Diameter", "L";
    "E", "pipe roughness", "L";
    "FB", "Freeboard", "L";
    "H", "height (includes freeboard)", "L";
    "HL", "head loss", "L";
    "HW", "local water depth", "L";
    "ID", "inner diameter", "L";
    "L", "length", "L";
    "Loc", "Locations", "L";
    "ND", "nominal diameter", "L";
    "OD", "outer diameter", "L";
    "R", "Radius", "L";
    "S", "space between components", "L";
    "T", "thickness", "L";
    "W", "width", "L";
    "Z", "elevation relative to bottom of sed tank", "L";
    "ZW", "water depth relative to bottom of sed tank", "L";
    "V", "velocity", "L/T";
    "CP", "Collision Potential", "L^(2/3)";
    "A", "Area", "L^2";
    "Nu", "kinematic viscosity", "L^2/T";
    "ED", "energy dissipation rate", "L^2/T^3";
    "Vol", "volume", "L^3";
    "Q", "flow", "L^3/T";
    "MW", "Molecular weight", "M";
    "C", "Concentration", "M/L^3";
    "Rho", "Density", "M/L^3";
    "AN", "angle", "radians";
    "Ti", "time", "T";
    "EN", "Enumerated type", "dimensionless";
    "N", "Number", "dimensionless";
    "Pi", "dimensionless geometric ratio", "";
    "AC", "AutoCAD command string", "";
    "K", "minor loss coefficient", ""
]
# [reference: ChannelF.xmcd]
# [reference: PlumbingF.xmcd]
# [reference: TankF.xmcd]
# [reference: StairsF.xmcd]
# [reference: DrainChannelF.xmcd]
# Specific Pieces:
# These are the codes that draw the bigger pieces of the plant (the sed tank, floc tank, etc)
# [reference: FlocculatorAC.xmcd]
# [reference: SedimentationTankAC.xmcd]
# [reference: EntranceTankAC.xmcd]
# [reference: ChemStockTanksAC.xmcd]
# [reference: DrainChannelAC.xmcd]
# [reference: StackedRapidSandFilterACabh35.xmcd]
# [reference: CdcAC.xmcd]
# [reference: OperatorAccessAC.xmcd]
# AutoCAD Materials:
# Adds the option of assigning materials to the entire plant design.
# [reference: MaterialsAC.xmcd]
# This rearranges the plant to optimize the layout
# [reference: PlantLayoutsAC.xmcd]
# This file will execute at the very end to create multiple views of the entire plant in paperspace
# Layouts:
# [reference: LayoutsAC.xmcd]
# Sedimentation
# Sed Tanks and Slopes:
N_SedTanks = 3
L_Sed = 12.4303 m
N_SedBays = 2  # Number of bays of inlet manifolds in each sed tank
# Length of the port through which water exits the inlet manifold
# Width of ferrous cement plates in whice one manifold port is cut
Q_SedBay = 11.6667 L/s
# Sedimentation Tank Sludge Drain:
N_SedSludgeOrifices = 96  # per cell
Ti_SludgeDrain = 30 min  # Tank Drain time
W_SedSludge = 13.8635 cm  # Width of the sludge channel
B_SedSludgeOrifices = 11.4051 cm  # Distance center to center between drain orifices
# Depth of the sludge channel
H_SedSludge = 13.8635 cm
W_SedDrainCover = 17.8635 cm
D_SedSludgeOrifice = 0.00967757 m  # Diameter of drain orifices
N_SedSludgeOrifices = 96
# Sedimentation Tank Dimensions:
Z_SedSludge = 0.138635 m  # Height from 0 of the top of the sludge drain
# Height from 0 of the top of the inlet manifold
W_Sed = 2.1336 m
L_Sed = 12.4303 m  # Total tank length
# Inlet Channel:
HW_SedInletChannel = 0.543538 m  # Width of the drop chimneys connecting channel to sed inlet manifolds
W_SedInletChannel = 0.755358 m  # length of drop chimmneys
L_SedChannel = 6.7008 m
H_SedInletChannel = 0.643538 m
# Sedimentation Tank Effluent Launder:
N_SedLaunderOrifices = 107  # Number of orifices per launder  # More Launder Dimensions
ND_SedLaunder = 8 in
Q_SedLaunderOrifices = 0.000109034 m^3/s
# Center to center launder spacing
L_SedLaunder = 11.0126 m
B_SedLaunderOrifices = 0.1 m
D_SedLaunderOrifice = 0.625 in
# Exit Channel:
W_SedExitChannel = 0.404063 m
H_SedExitChannel = 0.643538 m
HW_SedExitChannel = 0.503538 m  # water height in exit channel from 0
# Lamella:
L_SedPlate = 0.6 m  # center to center distance between lamella
B_SedPlate = 2.7 cm  # spacing between lamella
S_SedPlate = 2.5 cm
N_SedPlates = 350  # Number of Sed Plates per Sedimentation Tank Bay.
AN_SedPlate = 60 deg
V_SedC =  # error: This variable is undefined.
L_SedActive = 10.9096 m
V_SedUp = 86.0481 m/day
Z_SedLaunder = 1.81821 m
N_SedPlates = 350
HW_Sed = 1.96673 m
H_Sed = 2.09988 m
# Flocculator
# Look at Flocculator Positioning arrays
W_FlocChannel = 0.507863 m
# Fill last channel with bafffles from last channel
ED_Floc = 10 mW/kg
# Fix port width to be based on energy dissipation in that channel
# Adjust spacing after the number of baffles per channel is known.
HW_FlocEnd = 1.96673 m
# Check the residence time of the flocculator should be at least 20minutes
X_FlocBaffles = [
    0.643349, 0.643349, 0.643349, 0.643349;
    1.3367, 1.3367, 1.3367, 1.3367;
    2.03005, 2.03005, 2.03005, 2.03005;
    2.72339, 2.72339, 2.72339, 2.72339;
    3.41674, 3.41674, 3.41674, 3.41674;
    4.11009, 4.11009, 4.11009, 4.11009;
    4.80344, 4.80344, 4.80344, 4.80344;
    5.49679, 5.49679, 5.49679, 5.49679;
    6.19014, 6.19014, 6.19014, 6.19014;
    6.88349, 6.88349, 6.88349, 6.88349;
    7.57683, 7.57683, 7.57683, 7.57683;
    8.27018, 8.27018, 8.27018, 8.27018;
    8.96353, 8.96353, 8.96353, 8.96353;
    9.65688, 9.65688, 9.65688, 9.65688;
    10.3502, 10.3502, 10.3502, 10.3502;
    11.0436, 11.0436, 11.0436, 11.0436;
    11.7369, 11.7369, 11.7369, 11.7369;
    0, 0, 0, 12.4303
] m
L_FlocBaffles = [
    1.00171, 1.00171, 1.00171, 1.39338;
    1.39338, 1.39338, 1.39338, 1.00171;
    1.00171, 1.00171, 1.00171, 1.39338;
    1.39338, 1.39338, 1.39338, 1.00171;
    1.00171, 1.00171, 1.00171, 1.39338;
    1.39338, 1.39338, 1.39338, 1.00171;
    1.00171, 1.00171, 1.00171, 1.39338;
    1.39338, 1.39338, 1.39338, 1.00171;
    1.00171, 1.00171, 1.00171, 1.39338;
    1.39338, 1.39338, 1.39338, 1.00171;
    1.00171, 1.00171, 1.00171, 1.39338;
    1.39338, 1.39338, 1.39338, 1.00171;
    1.00171, 1.00171, 1.00171, 1.39338;
    1.39338, 1.39338, 1.39338, 1.00171;
    1.00171, 1.00171, 1.00171, 1.39338;
    1.39338, 1.39338, 1.39338, 1.00171;
    1.00171, 1.00171, 1.00171, 1.39338;
    0, 0, 0, 1.00171
] m
Z_FlocBaffles = [
    0, 0, 0, 0.965023;
    0.965023, 0.965023, 0.965023, 0;
    0, 0, 0, 0.965023;
    0.965023, 0.965023, 0.965023, 0;
    0, 0, 0, 0.965023;
    0.965023, 0.965023, 0.965023, 0;
    0, 0, 0, 0.965023;
    0.965023, 0.965023, 0.965023, 0;
    0, 0, 0, 0.965023;
    0.965023, 0.965023, 0.965023, 0;
    0, 0, 0, 0.965023;
    0.965023, 0.965023, 0.965023, 0;
    0, 0, 0, 0.965023;
    0.965023, 0.965023, 0.965023, 0;
    0, 0, 0, 0.965023;
    0.965023, 0.965023, 0.965023, 0;
    0, 0, 0, 0.965023;
    0, 0, 0, 0
] m
N_FlocChannels = 4
L_FlocTank = 49.7211 m
HL_Floc = 34.1674 cm
HW_FlocStart = 2.3084 m
S_FlocBaffle = [64.3349; 64.3349; 64.3349; 64.3349] cm
B_FlocBaffle = [69.3349; 69.3349; 69.3349; 69.3349] cm
N_FlocChannelBaffles = [17; 17; 17; 18]
W_FlocPort = [0.593349; 0.593349; 0.593349; 0.593349] m
HL_FlocChannels = [8.42484; 8.42484; 8.42484; 8.89288] cm
L_FlocBaffleLower = 1.00171 m
L_FlocBaffleUpper = 1.39338 m
H_FlocPort = [0.55066; 0.55066; 0.55066; 0.55066] m
Ti_Floc = 11.8245 min  # residence time of the flocculator
N_FlocBaffles = 69
# Materials List
N_Valves = 6
N_ValveCouplings = 6
N_SedPlatesTotal = 2100
N_SedPlatesPerSheet = 5
N_SedPlateSheets = 420
# AutoCAD Scripts
AC_SedTank =  # no stored result
AC_EntranceTank =  # no stored result
AC_FlocTank =  # error
AC_ChemTanks =  # no stored result
AC_OperatorAccess =  # error
AC_DrainChannel =  # error
AC_Layout = [
    "laythw"; "-layout t AguaClara 0"; "View"; "layout d Layout1"; " d Layout2"; "layout r View"; "TopView"; "layout s TopView"; ".ms"; "z o all "
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]
AC_MatApply = ["-insert MaterialsInsert"; "0,0,0 x 1 1  0"]
AC_Filter =  # no stored result
AC_Cdc = [
    "-layer m Cdc";
    "c t 125,0,160";
    "Cdc";
    "  ";
    "-insert https://confluence.cornell.edu/download/attachments/173604905/CdcLeverArm.dwg";
    "-12.15963,11.65213,2.77418 x 1 1  270";
    "-insert https://confluence.cornell.edu/download/attachments/173604905/CdcLeverArmBracket.dwg";
    "-12.57238,11.62013,2.74928 x 1 1  270";
    "-insert https://confluence.cornell.edu/download/attachments/173604905/CdcCht.dwg";
    "-13.50573,11.65213,2.86698 x 1 1  90"
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]
